PCLK1 := 168 MHz
ClockDivider := 28
BRP := 4
TimeSeg1 := 7
TimeSeg2 := 7
t_fdcan_tq_clk := 1/(PCLK1/ClockDivider)
tq := BRP*t_fdcan_tq_clk
t_SyncSeg := tq
t_BS1 := tq*TimeSeg1
t_BS2 := tq*TimeSeg2
baudrate := 1/(t_SyncSeg + t_BS1 + t_BS2) = 100 kHz
