# Use functions Seed and rnorm in a short program to generate identical sets of normally distributed random numbers for three iterations by resetting the Seed value.
p := 1000
μ := 0
σ := 2
Same(p, μ, σ) :=
    for i ∈ 0 .. 2
        Seed(1)
        nums ← rnorm(p, μ, σ)
        M[:, i] ← nums
    M
n_bins := 20
n := 0 .. n_bins
range[n] := n
q := 0 .. p - 1
S1[q] := Same(p, μ, σ)[:, 1][q] = [
    -0.877942; -1.35881; -0.946572; -1.90293; -3.37137; 0.0870606; -0.24127; 1.11285; 4.38357; 1.61747
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]
same := hist(n_bins, S1)
max(same) = 129
# [plot: same vs range]
Seed(1)
runif(20, 0, 1) = [0.0589646; 0.330327; 0.917281; 0.0833855; 0.768052; 0.783997; 0.91329; 0.6555; 0.906472; 0.574749; 0.699161; 0.641708; 0.016097; 0.805466; 0.239982; 0.0783042; 0.587519; 0.368686; 0.857641; 0.465034]
Seed(1) = 2617919885
rnorm(1, 0, 1) = [-0.438971]
runif(4, 0, 1) = [0.822838; 0.174129; 0.710495; 0.303986]
# Seed return value seems to be the value of the previous rng seed?
Seed(1) = 2179684817
Seed(1) = 1
Seed(1) = 1
Seed(2) = 1
Seed(2) = 2
# Different random functions:
Seed(1) = 2
rF(1, 1, 1) = [0.417458]
runif(4, 0, 1) = [0.710495; 0.303986; 0.0914113; 0.147313]
Seed(1) = 2503793637
rgeom(1, 0.5) = [9]
runif(4, 0, 1) = [0.193323; 0.585006; 0.350308; 0.822838]
Seed(1) = 3750785579
rgamma(1, 0.5) = [0.0963477]
runif(4, 0, 1) = [0.822838; 0.174129; 0.710495; 0.303986]
Seed(1) = 2179684817
rhypergeom(1, 0, 1, 1) = [0]
runif(4, 0, 1) = [0.00126842; 0.193323; 0.585006; 0.350308]
Seed(1) = 1924036713
rbeta(1, 1, 1) = [0.802319]
runif(4, 0, 1) = [0.585006; 0.350308; 0.822838; 0.174129]
Seed(1) = 1844513277
rcauchy(1, 0, 1) = [-250.949]
runif(4, 0, 1) = [0.193323; 0.585006; 0.350308; 0.822838]
Seed(1) = 3750785579
rbinom(1, 1, 0.5) = [0]
runif(4, 0, 1) = [0.193323; 0.585006; 0.350308; 0.822838]
Seed(1) = 3750785579
rexp(1, 0.5) = [13.34]
runif(4, 0, 1) = [0.193323; 0.585006; 0.350308; 0.822838]
Seed(1) = 3750785579
rchisq(1, 0.5) = [2.483e-11]
runif(4, 0, 1) = [0.350308; 0.822838; 0.174129; 0.710495]
Seed(1) = 3250303071
rlogis(1, 0, 1) = [-6.66871]
runif(4, 0, 1) = [0.193323; 0.585006; 0.350308; 0.822838]
Seed(1) = 3750785579
rnbinom(1, 1, 0.5) = [6]
runif(4, 0, 1) = [0.0914113; 0.147313; 0.988508; 0.11908]
Seed(1) = 10044473
rpois(1, 1) = [0]
runif(4, 0, 1) = [0.193323; 0.585006; 0.350308; 0.822838]
Seed(1) = 3750785579
rt(1, 1) = [0.64611]
runif(4, 0, 1) = [0.303986; 0.0914113; 0.147313; 0.988508]
Seed(1) = 3104592263
rweibull(1, 1) = [6.66998]
runif(4, 0, 1) = [0.193323; 0.585006; 0.350308; 0.822838]
